// COMSOL Multiphysics 6.0.0.318 model "scatteringA10.mph"
// Outline of the model tree

Parameters
  lda = 1.55[um]
  n_SiO2 = 1.45
  cx = 0.2[um]
  cy = 0[um]
  n_air = 1
  Einc_x = 0
  Einc_y = 0
  Einc_z = 1
  theta = 0
  k0 = 2*pi/lda
  kx = k0*cos(theta)
  ky = k0*sin(theta)
  r1 = 300[nm]
  p = 2[um]

Geometry
  geom1 "几何 1" (2D, length unit m)
    pol1: Polygon "多边形 1"
      source = table
      table = 
        {r1*cos(90*pi/180), r1*sin(90*pi/180)-r1*sin(306*pi/180)}
        {r1*cos(162*pi/180), r1*sin(162*pi/180)-r1*sin(306*pi/180)}
        {r1*cos(234*pi/180), r1*sin(234*pi/180)-r1*sin(306*pi/180)}
        {r1*cos(306*pi/180), r1*sin(306*pi/180)-r1*sin(306*pi/180)}
        {r1*cos(18*pi/180), r1*sin(18*pi/180)-r1*sin(306*pi/180)}
    sq1: Square "正方形 1" | base = center; size = p
    fin: Finalize "形成联合体"

Materials
  mat1: Common "材料 1" on domains 2
    RefractiveIndex "折射率"
      n = n_SiO2
      ki = 0
  mat2: Common "材料 2" on domains 1
    RefractiveIndex "折射率"
      n = n_air
      ki = 0

Physics
  ewfd: ElectromagneticWavesFrequencyDomain "电磁波，频域" on all domains
    dependent variable E = {Ex, Ey, Ez}
    ShapeProperty.order_electricfield = 1
    MeshControl.SizeControlParameter = FromStudy
    MeshControl.ResolveWaveInLossyMedia = 0
    components.components = outofplane
    BackgroundField.SolveFor = scatteredField
    BackgroundField.Eb = {Einc_x*exp(-1i*(kx*x+ky*y)), Einc_y*exp(-1i*(kx*x+ky*y)), Einc_z*exp(-1i*(kx*x+ky*y))}
    wee1: WaveEquationElectric "波动方程，电 1" (default) | DisplacementFieldModel = RefractiveIndex
    pec1: PerfectElectricConductor "理想电导体 1" (default)
    init1: init "初始值 1" (default)
    sctr1: Scattering "散射边界条件 1" on boundaries 1-3, 9

Mesh
  mesh1 "网格 1"
    size: MeshSizeDefault "大小" | hmax = 9.6880E-8; hmin = 6.0000E-10; hcurve = 0.3; hgrad = 1.3; custom = on
    size1: Size "大小 1" on domains 2 | hmax = lda/10/n_SiO2; custom = on
    size2: Size "大小 2" on domains 1 | hmax = lda/10/n_air; custom = on
    ftri1: FreeTri "自由三角形网格 1" on remaining entities | smoothmaxiter = 4; smoothmaxdepth = 4

Studies
  std1 "研究 1"
    wave: Wavelength "波长域" | plist = lda

Solver configurations
  sol1 "解 1" (study std1)
    v1: Variables "因变量 1"
    s1: Stationary "稳态求解器 1" | stol = 0.01
      p1: Parametric "参数化 1" | pname = lambda0; plistarr = lda; punit = µm; pcontinuationmode = no
      fc1: FullyCoupled "全耦合 1" | linsolver = d1
      d1: Direct "建议的直接求解器 (ewfd)"

Datasets
  dset1: Solution | solution = sol1

Plots
  pg1: PlotGroup2D "电场 (ewfd)" | data = dset1
    surf1: Surface "表面 1" | expr = ewfd.normE