// COMSOL Multiphysics 6.0.0.318 model "scatteringA8.mph"
// Outline of the model tree

Parameters
  lda = 1.55[um]
  n_SiO2 = 1.45
  n_air = 1
  l1 = 137.5[nm]
  l2 = 412.5[nm]
  p = 2[um]
  cx = 0.2[um]
  cy = 0.3[um]
  Einc_x = 0
  Einc_y = 0
  Einc_z = 1
  theta = 0
  k0 = 2*pi/lda
  kx = k0*cos(theta)
  ky = k0*sin(theta)

Geometry
  geom1 "几何 1" (2D, length unit m)
    r1: Rectangle "矩形 1" | pos = {cx, cy}; base = center; size = {l1, l2}
    r2: Rectangle "矩形 2" | pos = {cx, cy+l2/2}; base = center; size = {l2, l1}
    uni1: Union "并集 1" | input = r1, r2; intbnd = off; edge = all
    sq1: Square "正方形 1" | base = center; size = p
    fin: Finalize "形成联合体"

Materials
  mat1: Common "材料 1" on domains 2
    RefractiveIndex "折射率"
      n = n_SiO2
      ki = 0
  mat2: Common "材料 2" on domains 1
    RefractiveIndex "折射率"
      n = n_air
      ki = 0

Physics
  ewfd: ElectromagneticWavesFrequencyDomain "电磁波，频域" on all domains
    dependent variable E = {Ex, Ey, Ez}
    ShapeProperty.order_electricfield = 1
    MeshControl.SizeControlParameter = FromStudy
    MeshControl.ResolveWaveInLossyMedia = 0
    components.components = outofplane
    BackgroundField.SolveFor = scatteredField
    BackgroundField.Eb = {Einc_x*exp(-1i*(kx*x+ky*y)), Einc_y*exp(-1i*(kx*x+ky*y)), Einc_z*exp(-1i*(kx*x+ky*y))}
    wee1: WaveEquationElectric "波动方程，电 1" (default) | DisplacementFieldModel = RefractiveIndex
    pec1: PerfectElectricConductor "理想电导体 1" (default)
    init1: init "初始值 1" (default)
    sctr1: Scattering "散射边界条件 1" on boundaries 1-3, 16

Mesh
  mesh1 "网格 1"
    size: MeshSizeDefault "大小" | hmax = 6.2500E-8; hmin = 6.0000E-10; hcurve = 0.3; hgrad = 1.3; custom = on
    size1: Size "大小 1" on domains 1 | hmax = lda/10/n_air; custom = on
    size2: Size "大小 2" on domains 2 | hmax = lda/10/n_SiO2; custom = on
    ftri1: FreeTri "自由三角形网格 1" on remaining entities | smoothmaxiter = 4; smoothmaxdepth = 4

Studies
  std1 "研究 1"
    wave: Wavelength "波长域" | plist = lda