// COMSOL Multiphysics 6.0.0.318 model "scatteringB7.mph"
// Outline of the model tree

Parameters
  omega_p = 1.37e16[rad/s]
  omega_c = 8.17e13[rad/s]
  lda = 1.55[um]
  omega = c_const/lda*2*pi
  eps_Au = 1-omega_p*omega_p/(omega*(omega+1i*omega_c))
  n_Au = 1
  l1 = 58[nm]
  l2 = 100[nm]
  l3 = 90[nm]
  l4 = 130[nm]
  p = 2[um]
  cx = 0.2[um]
  cy = 0[um]
  eps_air = 1
  Einc_x = 0
  Einc_y = 0
  Einc_z = 1
  theta = 0
  k0 = 2*pi/lda
  kx = k0*cos(theta)
  ky = k0*sin(theta)

Geometry
  geom1 "几何 1" (2D, length unit m)
    pol1: Polygon "多边形 1"
      source = table
      table = 
        {0, 0}
        {l1*sqrt(3)/2, l1/2}
        {l1*sqrt(3)/2+l2, l1/2}
        {l1*sqrt(3)/2+l2, l4/2}
        {l1*sqrt(3)/2+l2+l3, l4/2}
        {l1*sqrt(3)/2+l2+l3, -l4/2}
        {l1*sqrt(3)/2+l2, -l4/2}
        {l1*sqrt(3)/2+l2, -l1/2}
        {l1*sqrt(3)/2, -l1/2}
    rot1: Rotate "旋转 1" | input = pol1; keep = on; rot = 60
    rot2: Rotate "旋转 2" | input = pol1; keep = on; rot = 120
    rot3: Rotate "旋转 3" | input = pol1; keep = on; rot = 180
    rot4: Rotate "旋转 4" | input = pol1; keep = on; rot = 240
    rot5: Rotate "旋转 5" | input = pol1; keep = on; rot = 300
    uni1: Union "并集 1" | input = pol1, rot1, rot2, rot3, rot4, rot5; intbnd = off; edge = all
    sq1: Square "正方形 1" | base = center; size = p
    mov1: Move "移动 1" | input = uni1; displx = cx; disply = cy
    fin: Finalize "形成联合体"

Materials
  mat1: Common "材料 1" on domains 1
    def "基本"
      electricconductivity = 0
      relpermeability = 1
      relpermittivity = eps_air
  mat2: Common "材料 2" on domains 2
    def "基本"
      electricconductivity = 0
      relpermeability = 1
      relpermittivity = eps_Au

Physics
  ewfd: ElectromagneticWavesFrequencyDomain "电磁波，频域" on all domains
    dependent variable E = {Ex, Ey, Ez}
    ShapeProperty.order_electricfield = 1
    MeshControl.SizeControlParameter = FromStudy
    MeshControl.ResolveWaveInLossyMedia = 0
    components.components = outofplane
    BackgroundField.SolveFor = scatteredField
    BackgroundField.Eb = {Einc_x*exp(-1i*(kx*x+ky*y)), Einc_y*exp(-1i*(kx*x+ky*y)), Einc_z*exp(-1i*(kx*x+ky*y))}
    wee1: WaveEquationElectric "波动方程，电 1" (default) | DisplacementFieldModel = RelativePermittivity
    pec1: PerfectElectricConductor "理想电导体 1" (default)
    init1: init "初始值 1" (default)
    sctr1: Scattering "散射边界条件 1" on boundaries 1-3, 46

Mesh
  mesh1 "网格 1"
    size: MeshSizeDefault "大小" | hmax = 6.2500E-8; hmin = 6.0000E-10; hcurve = 0.3; hgrad = 1.3; custom = on
    size1: Size "大小 1" on domains 1 | hmax = lda/10; custom = on
    size2: Size "大小 2" on domains 2 | hmax = lda/10/n_Au; custom = on
    ftri1: FreeTri "自由三角形网格 1" on remaining entities | smoothmaxiter = 4; smoothmaxdepth = 4

Studies
  std1 "研究 1"
    wave: Wavelength "波长域" | plist = lda