// COMSOL Multiphysics 6.0.0.318 model "case14_2D_freq.mph"
// Outline of the model tree

Parameters
  d = 62e-9/500e-9
  t = 5e-9/500e-9
  g = 5e-9/500e-9
  h1 = 80e-9/500e-9
  r0 = 4e-9/500e-9
  r1 = d/2/sin(pi*72/180)
  ldaT = 528e-9/500e-9
  ldaM = 700e-9/500e-9
  lda1 = 1.056

Geometry
  geom1 "几何 1" (2D, length unit m)
    pol1: Polygon "多边形 1"
      source = table
      table = 
        {r1*cos(90*pi/180), r1*sin(90*pi/180)-r1*sin(306*pi/180)}
        {r1*cos(162*pi/180), r1*sin(162*pi/180)-r1*sin(306*pi/180)}
        {r1*cos(234*pi/180), r1*sin(234*pi/180)-r1*sin(306*pi/180)}
        {r1*cos(306*pi/180), r1*sin(306*pi/180)-r1*sin(306*pi/180)}
        {r1*cos(18*pi/180), r1*sin(18*pi/180)-r1*sin(306*pi/180)}
    fil1: Fillet "倒圆角 1" | point = pol1(1) points 1-5; radius = r0
    sca1: Scale "比例因子 1"
      input = fil1
      keep = on
      isotropic = (r1+2*t)/r1
      factor = (r1+2*t)/r1
      pos = {0, -r1*sin(306*pi/180)}
    r1: Rectangle "矩形 1" | pos = {-d, -t-g}; size = {2*d, t+g}
    uni1: Union "并集 1" | input = r1, sca1; intbnd = off; edge = all
    r2: Rectangle "矩形 2" | pos = {-d, -t-g-h1}; size = {2*d, h1}
    r3: Rectangle "矩形 3" | pos = {-d, 0}; size = {2*d, h1}
    fin: Finalize "形成联合体"

Materials
  mat1: Common "Au (Gold) (Rakic et al. 1998: Lorentz-Drude model; n,k 0.248-6.20 um)" on domains 1, 5
    RefractiveIndex
      n = nr(c_const/freq*500e-9)
      ki = ni(c_const/freq*500e-9)
      int1: Interpolation
        funcname = nr
        table = 
          {2.4797e-01, 1.0941e+00}
          {2.5201e-01, 1.1321e+00}
          {2.5612e-01, 1.1718e+00}
          {2.6030e-01, 1.2127e+00}
          {2.6454e-01, 1.2543e+00}
          {2.6886e-01, 1.2958e+00}
          {2.7324e-01, 1.3366e+00}
          {2.7770e-01, 1.3759e+00}
          {2.8222e-01, 1.4130e+00}
          {2.8683e-01, 1.4470e+00}
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        fununit = 1
        argunit = um
      int2: Interpolation
        funcname = ni
        table = 
          {2.4797e-01, 1.5478e+00}
          {2.5201e-01, 1.5836e+00}
          {2.5612e-01, 1.6151e+00}
          {2.6030e-01, 1.6421e+00}
          {2.6454e-01, 1.6643e+00}
          {2.6886e-01, 1.6816e+00}
          {2.7324e-01, 1.6938e+00}
          {2.7770e-01, 1.7011e+00}
          {2.8222e-01, 1.7037e+00}
          {2.8683e-01, 1.7019e+00}
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        fununit = 1
        argunit = um
  mat2: Common "材料 2" on domains 2, 4
    RefractiveIndex "折射率"
      n = 1.5
      ki = 0
  mat3: Common "材料 3" on domains 3
    RefractiveIndex "折射率"
      n = 1
      ki = 0

Physics
  ewfd: ElectromagneticWavesFrequencyDomain "电磁波，频域" on all domains
    dependent variable E = {Ex, Ey, Ez}
    ShapeProperty.order_electricfield = 1
    MeshControl.SizeControlParameter = Wavelength
    MeshControl.PhysicsControlledMeshMinimumWavelength = 1
    components.components = inplane
    wee1: WaveEquationElectric "波动方程，电 1" (default)
    pec1: PerfectElectricConductor "理想电导体 1" (default)
    init1: init "初始值 1" (default)
    sctr1: Scattering "散射边界条件 1" on all boundaries
    sctr2: Scattering "散射边界条件 2" on boundaries 7 | IncidentField = EField; E0i = {1, 0, 0}

Mesh
  mesh1 "网格 1" (physics-controlled)

Studies
  std1 "研究 1"
    freq: Frequency "频域" | punit = Hz; plist = c_const/lda1

Solver configurations
  sol1 "解 1" (study std1)
    v1: Variables "因变量 1"
    s1: Stationary "稳态求解器 1" | stol = 0.01
      p1: Parametric "参数化 1" | pname = freq; plistarr = c_const/lda1; punit = Hz; pcontinuationmode = no
      fc1: FullyCoupled "全耦合 1" | linsolver = d1
      d1: Direct "建议的直接求解器 (ewfd)"

Datasets
  dset1: Solution | solution = sol1

Plots
  pg1: PlotGroup2D "电场 (ewfd)" | data = dset1
    surf1: Surface "表面 1" | expr = ewfd.normE