// COMSOL Multiphysics 6.0.0.318 model "doublePBC.mph"
// Outline of the model tree

Parameters
  aa = 0.25[m]
  h0 = 0.2[m]
  h1 = 0.15[m]
  h2 = 0.6[m]
  L = 0.19[m]
  W = 0.09[m]
  hh = 2[m]
  lda0 = 0.7[m]
  k0 = 2*pi/lda0
  kx = k0*sin(nn)
  nn = 0
  kz = sqrt(k0*k0-kx*kx)

Variables
  var1 "变量 1"
    EEx = exp(1i*k0*z)[V/m]
    EEy = 1i*exp(1i*k0*z)[V/m]
    EEz = 0
    HHx = 1i[A/m]*exp(1i*k0*z)/120/pi
    HHy = -1[A/m]*exp(1i*k0*z)/120/pi
    PPz = 0.5*(realdot(EEx,HHy)-realdot(EEy,HHx))

Probes
  bnd1: Boundary "边界探针 1" on boundaries 13
    type = integral
    probename = In
    expr = -PPz
    unit = W
    intorder = 8
    tableplotcolumns = {7, 8}
    tableplotheadings = {#lambda0 (m), "#-PPz (W), 边界探针 1", "#-ewfd.Poavz (W), 边界探针 2", "#-ewfd.Poavz (W), 边界探针 3", #(In-R-T)/In, #In-bnd3, #T0/In (1), #R0/In (1)}
    tableplotxaxis = 1
    table = tbl1
  bnd2: Boundary "边界探针 2" on boundaries 3
    type = integral
    probename = T0
    expr = -ewfd.Poavz
    unit = W
    intorder = 9
    tableplotcolumns = {7, 8}
    tableplotheadings = {#lambda0 (m), "#-PPz (W), 边界探针 1", "#-ewfd.Poavz (W), 边界探针 2", "#-ewfd.Poavz (W), 边界探针 3", #(In-R-T)/In, #In-bnd3, #T0/In (1), #R0/In (1)}
    tableplotxaxis = 1
    table = tbl1
  bnd3: Boundary "边界探针 3" on boundaries 13
    type = integral
    expr = -ewfd.Poavz
    unit = W
    intorder = 8
    tableplotcolumns = {7, 8}
    tableplotheadings = {#lambda0 (m), "#-PPz (W), 边界探针 1", "#-ewfd.Poavz (W), 边界探针 2", "#-ewfd.Poavz (W), 边界探针 3", #(In-R-T)/In, #In-bnd3, #T0/In (1), #R0/In (1)}
    tableplotxaxis = 1
    table = tbl1
  var1: GlobalVariable "全局变量探针 1" | probename = Absor0; expr = (In-R-T)/In; unit = 1; table = tbl1
  var2: GlobalVariable "全局变量探针 2"
    probename = R0
    expr = In-bnd3
    tableplotcolumns = {7, 8}
    tableplotheadings = {#lambda0 (m), "#-PPz (W), 边界探针 1", "#-ewfd.Poavz (W), 边界探针 2", "#-ewfd.Poavz (W), 边界探针 3", #(In-R-T)/In, #In-bnd3, #T0/In (1), #R0/In (1)}
    tableplotxaxis = 1
    table = tbl1
  var3: GlobalVariable "全局变量探针 3" | probename = T; expr = T0/In; unit = 1; table = tbl1
  var4: GlobalVariable "全局变量探针 4" | probename = R; expr = R0/In; unit = s^3/(kg*m^2); table = tbl1

Geometry
  geom1 "几何 1" (3D, length unit m)
    blk1: Block "长方体 1" | pos = {0, 0, (h0+h1)/2-0.5}; base = center; size = {aa, aa, h0+h1}; layername = 层 1; layer = h0
    blk2: Block "长方体 2" | pos = {0, 0, h0+h1+h2/2-0.5}; rot = 45; base = center; size = {W, L, h2}
    blk3: Block "长方体 3" | base = center; size = {aa, aa, hh}
    fin: Finalize "形成联合体"

Materials
  mat1: Common "air" on domains 1, 4
    RefractiveIndex "折射率"
      n = 1
      ki = 0
  mat2: Common "TiO2 (Titanium dioxide) (Devore 1951: Crystal; n(o) 0.43-1.53 um)" on domains 5
    RefractiveIndex
      n = an1(c_const/freq/1e6)
      ki = 0
      an1: Analytic | expr = sqrt((5.913)+(0.2441)/(x^2-0.0803)); fununit = 1; argunit = um
  mat3: Common "Si (Silicon) (Schinke et al. 2015: n,k 0.25-1.45 um)" on domains 2
    RefractiveIndex
      n = nr(c_const/freq/1e6)
      ki = ni(c_const/freq/1e6)
      int1: Interpolation
        funcname = nr
        table = 
          {0.25, 1.637}
          {0.26, 1.737}
          {0.27, 2.030}
          {0.28, 2.840}
          {0.29, 4.185}
          {0.30, 5.049}
          {0.31, 5.091}
          {0.32, 5.085}
          {0.33, 5.135}
          {0.34, 5.245}
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        fununit = 1
        argunit = um
      int2: Interpolation
        funcname = ni
        table = 
          {0.25, 3.5889E+00}
          {0.26, 3.9932E+00}
          {0.27, 4.5958E+00}
          {0.28, 5.1961E+00}
          {0.29, 5.3124E+00}
          {0.30, 4.2900E+00}
          {0.31, 3.6239E+00}
          {0.32, 3.2824E+00}
          {0.33, 3.0935E+00}
          {0.34, 2.9573E+00}
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        fununit = 1
        argunit = um
  mat4: Common "Ag (Silver) (Ciesielski et al. 2017: Ag/SiO2; n,k 0.191-20.9 um)" on domains 3
    RefractiveIndex
      n = nr(c_const/freq/1e6)
      ki = ni(c_const/freq/1e6)
      int1: Interpolation
        funcname = nr
        table = 
          {0.19077, 1.017}
          {0.19136, 1.020}
          {0.19195, 1.023}
          {0.19255, 1.026}
          {0.19315, 1.029}
          {0.19375, 1.032}
          {0.19436, 1.035}
          {0.19497, 1.038}
          {0.19558, 1.041}
          {0.19620, 1.044}
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        fununit = 1
        argunit = um
      int2: Interpolation
        funcname = ni
        table = 
          {0.19077, 1.100}
          {0.19136, 1.104}
          {0.19195, 1.108}
          {0.19255, 1.111}
          {0.19315, 1.115}
          {0.19375, 1.118}
          {0.19436, 1.122}
          {0.19497, 1.125}
          {0.19558, 1.129}
          {0.19620, 1.132}
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        fununit = 1
        argunit = um
  mat5: Common "材料 5" (disabled) on domains 2
    RefractiveIndex "折射率"
      n = 3.8
      ki = 0

Physics
  ewfd: ElectromagneticWavesFrequencyDomain "电磁波，频域" on all domains
    dependent variable E = {Ex, Ey, Ez}
    ShapeProperty.order_electricfield = 1
    MeshControl.SizeControlParameter = FromStudy
    MeshControl.PhysicsControlledMeshMinimumWavelength = 4[um]
    wee1: WaveEquationElectric "波动方程，电 1" (default)
    pec1: PerfectElectricConductor "理想电导体 1" (default)
    init1: init "初始值 1" (default)
    sctr1: Scattering "散射边界条件 1" on boundaries 3
    sctr2: Scattering "散射边界条件 2" on boundaries 13 | IncidentField = EField; E0i = {1, 0, 0}
    pc1: PeriodicCondition "周期性条件 1" on boundaries 1, 4, 7, 10, 24-27
      PeriodicType = Continuity
      kFloquet = {kx, 0, 0}
      destinationDomains: boundaries 24-27
    pc2: PeriodicCondition "周期性条件 2" on boundaries 2, 5, 8, 11, 14-17
      PeriodicType = Continuity
      kFloquet = {kx, 0, 0}
      destinationDomains: boundaries 14-17

Mesh
  mesh1 "网格 1"
    size: MeshSizeDefault "大小" | hmax = 0.070000; hmin = 0.0021000; hcurve = 0.6; hnarrow = 0.5; hgrad = 1.5; custom = on
    size1: Size "大小 1" on domains 5 | hmax = 0.027440; custom = on
    size2: Size "大小 2" (disabled) on domains 2 | hmax = 0.018420
    size3: Size "大小 3" on all boundaries | hmax = 0.070000
    size4: Size "大小 4" (disabled) on boundaries 4, 5, 15, 25
      hmax = 0.018420
      hmin = 5.5260E-4
      hcurve = 0.6
      hnarrow = 0.5
      hgrad = 1.5
      custom = on
    ftri1: FreeTri "自由三角形网格 1" on boundaries 1, 4, 7, 10
    copy1: Copy "复制 1" | mesh = mesh1; source = boundaries 1, 4, 7, 10; destination = boundaries 24-27
    ftri2: FreeTri "自由三角形网格 2" on boundaries 2, 5, 8, 11
    copy2: Copy "复制 2" | mesh = mesh1; source = boundaries 2, 5, 8, 11; destination = boundaries 14-17
    ftet1: FreeTet "自由四面体网格 1" on remaining entities | optcurved = on

Studies
  std1 "研究 1"
    wave: Wavelength "波长域" | punit = m; plist = lda0

Solver configurations
  sol1 "解 1" (study std1)
    v1: Variables "因变量 1"
    s1: Stationary "稳态求解器 1" | stol = 0.01
      p1: Parametric "参数化 1" | pname = lambda0; plistarr = lda0; punit = m; pcontinuationmode = no
      fc1: FullyCoupled "全耦合 1" | linsolver = d1
      d1: Direct "建议的直接求解器 (ewfd)"

Datasets
  dset1: Solution | solution = sol1
  dset2: Solution "探针解 2" | solution = sol1
  int1: Integral "边界探针 1" on boundaries 13 | data = dset2
  int2: Integral "边界探针 2" on boundaries 3 | data = dset2
  int3: Integral "边界探针 3" on boundaries 13 | data = dset2

Derived values
  pev1: EvalPoint "边界探针 1" | data = int1; table = tbl1; expr = -PPz
  pev2: EvalPoint "边界探针 2" | data = int2; table = tbl1; expr = -ewfd.Poavz
  pev3: EvalPoint "边界探针 3" | data = int3; table = tbl1; expr = -ewfd.Poavz
  gev1: EvalGlobal "全局变量探针 1" | data = dset2; table = tbl1; expr = (In-R-T)/In
  gev2: EvalGlobal "全局变量探针 2" | data = dset2; table = tbl1; expr = In-bnd3
  gev3: EvalGlobal "全局变量探针 3" | data = dset2; table = tbl1; expr = T0/In
  gev4: EvalGlobal "全局变量探针 4" | data = dset2; table = tbl1; expr = R0/In

Tables
  tbl1: Table "探针表 1"
    lambda0 (m) | -PPz (W), 边界探针 1 | -ewfd.Poavz (W), 边界探针 2 | -ewfd.Poavz (W), 边界探针 3 | (In-R-T)/In | In-bnd3 | T0/In (1) | R0/In (1)
    0.7 | 0.000165786 | 1.52915e-09 | 3.62743e-06 | -5898.94 | 0.000162159 | 9.22361e-06 | 0.97812

Plots
  pg2: PlotGroup1D "探针绘图组 2" | data = none
    tblp1: Table "探针表图 1" | table = tbl1; xaxisdata = 1; plotcolumns = {7, 8}
  pg6: PlotGroup1D "探针绘图组 6"
    tblp1: Table "探针表图 1" | table = tbl1
  pg7: PlotGroup3D "电场 (ewfd)" | data = dset1
    mslc1: Multislice "多切面 1" | expr = ewfd.normE