// COMSOL Multiphysics 6.0.0.318 model "case1_2D.mph"
// Outline of the model tree

Parameters
  period = 920e-9/lambda
  h1 = 1e-6/lambda
  h2 = 150e-9/lambda
  h3 = 300e-9/lambda
  groove_deepth = 55e-9/lambda
  factor = 0.8
  lambda = 976[nm]

Geometry
  geom1 "几何 1" (2D, length unit m)
    r1: Rectangle "矩形 1" | size = {period, h3-groove_deepth}
    r2: Rectangle "矩形 2" | pos = {period*(1-factor)/2, h3-groove_deepth}; size = {period*factor, groove_deepth}
    r3: Rectangle "矩形 3" | pos = {0, h3-groove_deepth}; size = {period, h2}
    r4: Rectangle "矩形 4" | pos = {period*(1-factor)/2, h2+h3-groove_deepth}; size = {period*factor, groove_deepth}
    r5: Rectangle "矩形 5" | pos = {0, h2+h3-groove_deepth}; size = {period, h1+groove_deepth}
    fin: Finalize "形成联合体"

Materials
  mat1: Common "材料 1" on all domains
    RefractiveIndex "折射率"
      n = 1
      ki = 0
  mat3: Common "Au (Gold) (Johnson and Christy 1972: n,k 0.188-1.937 um)" (disabled) on domains 2, 5
    RefractiveIndex
      n = nr(c_const/freq)
      ki = ni(c_const/freq)
      int1: Interpolation
        funcname = nr
        table = 
          {0.1879, 1.28}
          {0.1916, 1.32}
          {0.1953, 1.34}
          {0.1993, 1.33}
          {0.2033, 1.33}
          {0.2073, 1.30}
          {0.2119, 1.30}
          {0.2164, 1.30}
          {0.2214, 1.30}
          {0.2262, 1.31}
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        fununit = 1
        argunit = um
      int2: Interpolation
        funcname = ni
        table = 
          {0.1879, 1.188}
          {0.1916, 1.203}
          {0.1953, 1.226}
          {0.1993, 1.251}
          {0.2033, 1.277}
          {0.2073, 1.304}
          {0.2119, 1.350}
          {0.2164, 1.387}
          {0.2214, 1.427}
          {0.2262, 1.460}
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        fununit = 1
        argunit = um
  mat4: Common "Au (Gold) (Rakic et al. 1998: Brendel-Bormann model; n,k 0.248-6.20 um)" on domains 2, 5
    RefractiveIndex
      n = nr(c_const/freq*lambda)
      ki = ni(c_const/freq*lambda)
      int1: Interpolation
        funcname = nr
        table = 
          {2.4797e-01, 1.4943e+00}
          {2.5201e-01, 1.5158e+00}
          {2.5612e-01, 1.5382e+00}
          {2.6030e-01, 1.5611e+00}
          {2.6454e-01, 1.5844e+00}
          {2.6886e-01, 1.6078e+00}
          {2.7324e-01, 1.6306e+00}
          {2.7770e-01, 1.6527e+00}
          {2.8222e-01, 1.6733e+00}
          {2.8683e-01, 1.6921e+00}
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        fununit = 1
        argunit = um
      int2: Interpolation
        funcname = ni
        table = 
          {2.4797e-01, 1.9575e+00}
          {2.5201e-01, 1.9594e+00}
          {2.5612e-01, 1.9605e+00}
          {2.6030e-01, 1.9604e+00}
          {2.6454e-01, 1.9587e+00}
          {2.6886e-01, 1.9551e+00}
          {2.7324e-01, 1.9494e+00}
          {2.7770e-01, 1.9414e+00}
          {2.8222e-01, 1.9312e+00}
          {2.8683e-01, 1.9188e+00}
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        fununit = 1
        argunit = um
  mat5: Common "材料 5" on domains 1, 4
    RefractiveIndex "折射率"
      n = 1.55
      ki = 0

Physics
  ewfd: ElectromagneticWavesFrequencyDomain "电磁波，频域" on all domains
    dependent variable E = {Ex, Ey, Ez}
    ShapeProperty.order_electricfield = 1
    MeshControl.SizeControlParameter = Wavelength
    MeshControl.PhysicsControlledMeshMinimumWavelength = 2
    components.components = inplane
    BackgroundField.SolveFor = fullField
    BackgroundField.Eb = {0, 0, 1}
    wee1: WaveEquationElectric "波动方程，电 1" (default) | DisplacementFieldModel = RefractiveIndex
    pec1: PerfectElectricConductor "理想电导体 1" (default)
    init1: init "初始值 1" (default)
    pmc1: PerfectMagneticConductor "理想磁导体 1" (disabled) on all boundaries
    sctr1: Scattering "散射边界条件 1" on boundaries 7 | IncidentField = EField; E0i = {1, 0, 0}
    pc1: PeriodicCondition "周期性条件 1" on boundaries 1, 3, 5, 18-20 | destinationDomains: boundaries 18-20
    sctr2: Scattering "散射边界条件 2" on boundaries 2
    pmc2: PerfectMagneticConductor "理想磁导体 2" (disabled) on boundaries 1, 3, 5, 18-20

Mesh
  mesh1 "网格 1"
    size: MeshSizeDefault "大小" | hcurve = 0.3; hgrad = 1.2; hnarrow = 1
    size1: Size "大小 1" on domains 1, 4 | hmax = 1/10/1.55
    size4: Size "大小 4" on domains 2, 5 | hmax = 1/10/3.5; custom = on
    size2: Size "大小 2" on boundaries 3, 5, 19, 20
      hmax = 0.062500
      hmin = 7.5300E-4
      hcurve = 0.3
      hgrad = 1.3
      custom = on
    size3: Size "大小 3" on boundaries 1, 18 | hmax = 0.040320; hmin = 7.5300E-4; hcurve = 0.3; hgrad = 1.3; custom = on
    edg1: Edge "边 1" on boundaries 1, 3, 5 | smoothmaxiter = 4; smoothmaxdepth = 4
    copy1: Copy "复制 1"
      mesh = mesh1
      source = boundaries 1, 3, 5
      destination = boundaries 18-20
      smoothmaxiter = 4
      smoothmaxdepth = 4
    ftri1: FreeTri "自由三角形网格 1" on remaining entities | smoothmaxiter = 4; smoothmaxdepth = 4

Studies
  std1 "研究 1"
    freq: Frequency "频域" | punit = Hz; plist = c_const/1[m]

Solver configurations
  sol1 "解 1" (study std1)
    v1: Variables "因变量 1"
    s1: Stationary "稳态求解器 1" | stol = 0.01
      p1: Parametric "参数化 1" | pname = freq; plistarr = c_const/1[m]; punit = Hz; pcontinuationmode = no
      fc1: FullyCoupled "全耦合 1" | linsolver = d1
      d1: Direct "建议的直接求解器 (ewfd)"

Datasets
  dset1: Solution | solution = sol1

Plots
  pg1: PlotGroup2D "电场 (ewfd)" | data = dset1
    surf1: Surface "表面 1" | expr = ewfd.normE